OpenVSP model (file version 5), 12 components.
Geometry view with OpenVSP parameter names; values to 6 digits, angles in degrees, lengths in the model's unit.
Overall bounding box: X_Min=0 X_Len=76.8467 Y_Min=-39.7009 Y_Len=79.4018 Z_Min=-5.5 Z_Len=23.8

Fuselage "Fuselage_DoubleDeck"
  location (X Y Z) 0 0 0, rotation 0 0 0
  bounding box size 72.72 7.14 8.4
  Design: Length=72.72
  cross sections:
    n  XLocPercent  YLocPercent  ZLocPercent  shape
    0  0            0            0            point
    1  0.12         0            0            ellipse Ellipse_Height=6.8 Ellipse_Width=5.8
    2  0.5          0            0            ellipse Ellipse_Height=8.4 Ellipse_Width=7.14
    3  0.82         0            0            ellipse Ellipse_Height=6.2 Ellipse_Width=5.2
    4  1            0            0            point

Wing "MainWing"
  location (X Y Z) 24.5 0 -1.8, rotation 0 0 0
  symmetric about XZ
  bounding box size 30.1998 79.4018 4.80345
  totals: TotalSpan=79.75 TotalProjectedSpan=79.3828 TotalChord=10.65 TotalArea=849.337 TotalAR=7.41947 MAC=12.1186
  root: chord 17.5, twist 0, NACA 4-series Camber=0.022 CamberLoc=0.2 ThickChord=0.125
  sections:
    n  Span    Root_Chord  Tip_Chord  Area     Sweep  Sweep_Location  Dihedral  Twist  Twist_Location  tip airfoil
    1  39.875  17.5        3.8        424.669  33.5   0               5.5       0      0.25            NACA 4-series Camber=0.022 CamberLoc=0.2 ThickChord=0.095

Wing "HorizontalStabilizer"
  location (X Y Z) 62.5 0 4.2, rotation 0 0 0
  symmetric about XZ
  bounding box size 14.3467 30.2743 2.26077
  totals: TotalSpan=30.4 TotalProjectedSpan=30.2335 TotalChord=6.7 TotalArea=203.68 TotalAR=4.48774 MAC=7.09005
  root: chord 9.5, twist 0, NACA 4-series Camber=0 CamberLoc=0.2 ThickChord=0.1
  sections:
    n  Span  Root_Chord  Tip_Chord  Area    Sweep  Sweep_Location  Dihedral  Twist  Twist_Location  tip airfoil
    1  15.2  9.5         3.9        101.84  34.5   0               6         0      0.25            as above

Wing "VerticalStabilizer"
  location (X Y Z) 51.5 0 3.8, rotation 90 0 0
  bounding box size 16.6669 1.2007 14.5
  totals: TotalSpan=14.5 TotalProjectedSpan=14.5 TotalChord=8.25 TotalArea=119.625 TotalAR=1.75758 MAC=8.81818
  root: chord 12, twist 0, NACA 4-series Camber=0 CamberLoc=0.2 ThickChord=0.1
  sections:
    n  Span  Root_Chord  Tip_Chord  Area     Sweep  Sweep_Location  Dihedral  Twist  Twist_Location  tip airfoil
    1  14.5  12          4.5        119.625  40     0               0         0      0.25            as above

Pod "Inboard_Engines"
  location (X Y Z) 28.5 15.5 -3.6, rotation 0 0 0
  symmetric about XZ
  bounding box size 7 34.8 3.8
  Design: FineRatio=3.68421 Length=7

Wing "Inboard_Pylons"
  location (X Y Z) 29.5 15.5 -3.6, rotation 90 0 0
  symmetric about XZ
  bounding box size 6.27017 31.6003 2.2
  totals: TotalSpan=4.4 TotalProjectedSpan=4.4 TotalChord=5.5 TotalArea=24.2 TotalAR=0.8 MAC=5.51515
  root: chord 6, twist 0, NACA 4-series Camber=0 CamberLoc=0.2 ThickChord=0.1
  sections:
    n  Span  Root_Chord  Tip_Chord  Area  Sweep  Sweep_Location  Dihedral  Twist  Twist_Location  tip airfoil
    1  2.2   6           5          12.1  30     0               0         0      0.25            as above

Pod "Outboard_Engines"
  location (X Y Z) 34.5 26.5 -2.6, rotation 0 0 0
  symmetric about XZ
  bounding box size 7 56.8 3.8
  Design: FineRatio=3.68421 Length=7

Wing "Outboard_Pylons"
  location (X Y Z) 35.5 26.5 -2.6, rotation 90 0 0
  symmetric about XZ
  bounding box size 5.6547 53.5503 2
  totals: TotalSpan=4 TotalProjectedSpan=4 TotalChord=5 TotalArea=20 TotalAR=0.8 MAC=5.01667
  root: chord 5.5, twist 0, NACA 4-series Camber=0 CamberLoc=0.2 ThickChord=0.1
  sections:
    n  Span  Root_Chord  Tip_Chord  Area  Sweep  Sweep_Location  Dihedral  Twist  Twist_Location  tip airfoil
    1  2     5.5         4.5        10    30     0               0         0      0.25            as above

Pod "LH2_CryoTanks_Upper"
  location (X Y Z) 46.5 1.35 1.25, rotation 0 0 0
  symmetric about XZ
  bounding box size 6.6 4.9 2.2
  Design: FineRatio=6 Length=6.6

Pod "LH2_CryoTanks_Lower"
  location (X Y Z) 46.5 1.35 -1.25, rotation 0 0 0
  symmetric about XZ
  bounding box size 6.6 4.9 2.2
  Design: FineRatio=6 Length=6.6

Pod "ZEROe_Hydrogen_Engine_Pod"
  location (X Y Z) 55 0 5.3, rotation 0 0 0
  bounding box size 5.2 2.3 2.3
  Design: FineRatio=4.52174 Length=5.2

Wing "ZEROe_Dorsal_Pylon"
  location (X Y Z) 56 0 3.8, rotation 90 0 0
  symmetric about XZ
  bounding box size 4.2 0.420244 1.6
  totals: TotalSpan=3.2 TotalProjectedSpan=3.2 TotalChord=3.7 TotalArea=11.84 TotalAR=0.864865 MAC=3.72252
  root: chord 4.2, twist 0, NACA 4-series Camber=0 CamberLoc=0.2 ThickChord=0.1
  sections:
    n  Span  Root_Chord  Tip_Chord  Area  Sweep  Sweep_Location  Dihedral  Twist  Twist_Location  tip airfoil
    1  1.6   4.2         3.2        5.92  30     0               0         0      0.25            as above
