OpenVSP model (file version 5), 17 components.
Geometry view with OpenVSP parameter names; values to 6 digits, angles in degrees, lengths in the model's unit.
Overall bounding box: X_Min=0 X_Len=38 Y_Min=-40.0305 Y_Len=80.0609 Z_Min=-3.70697 Z_Len=8.56286

Wing "AETHER_BWB_Airframe"
  location (X Y Z) 0 0 0, rotation 0 0 0
  symmetric about XZ
  bounding box size 38 80.0609 8.56286
  totals: TotalSpan=84.6 TotalProjectedSpan=79.9256 TotalChord=1.45 TotalArea=93.7 TotalAR=68.176 MAC=22.6461
  root: chord 38, twist 0, NACA 4-series Camber=0 CamberLoc=0.2 ThickChord=0.195
  sections:
    n  Span  Root_Chord  Tip_Chord  Area  Sweep  Sweep_Location  Dihedral  Twist  Twist_Location  tip airfoil
    1  8     38          26         22.5  38     0               1         0      0.25            as above
    2  12    1           10         1     42     0               2         0      0.25            NACA 4-series Camber=0 CamberLoc=0.2 ThickChord=0.145
    3  18.8  1           1          18.8  33     0               3         0      0.25            NACA 4-series Camber=0 CamberLoc=0.2 ThickChord=0.115
    4  3.5   1           1.6        4.55  45     0               70        0      0.25            NACA 4-series Camber=0 CamberLoc=0.2 ThickChord=0.09

Fuselage "Turbofan_Engine_Center"
  location (X Y Z) 0 0 0, rotation 0 0 0
  bounding box size 7 3.4 3.4
  Design: Length=7
  cross sections:
    n  XLocPercent  YLocPercent  ZLocPercent  shape
    0  0            0            0            point
    1  0.25         0            0            ellipse Ellipse_Height=3.4 Ellipse_Width=3.4
    2  0.5          0            0            as above
    3  0.75         0            0            as above
    4  1            0            0            point

Wing "Engine_Pylon_Center"
  location (X Y Z) 0 0 0, rotation 90 0 0
  symmetric about XZ
  bounding box size 5.1547 0.360433 2
  totals: TotalSpan=4 TotalProjectedSpan=4 TotalChord=4.25 TotalArea=17 TotalAR=0.941176 MAC=4.2549
  root: chord 4.5, twist 0, NACA 4-series Camber=0 CamberLoc=0.2 ThickChord=0.08
  sections:
    n  Span  Root_Chord  Tip_Chord  Area  Sweep  Sweep_Location  Dihedral  Twist  Twist_Location  tip airfoil
    1  2     4.5         4          8.5   30     0               0         0      0.25            as above

Fuselage "Turbofan_Engine_Port"
  location (X Y Z) 0 0 0, rotation 0 0 0
  bounding box size 7 3.4 3.4
  Design: Length=7
  cross sections:
    n  XLocPercent  YLocPercent  ZLocPercent  shape
    0  0            0            0            point
    1  0.25         0            0            ellipse Ellipse_Height=3.4 Ellipse_Width=3.4
    2  0.5          0            0            as above
    3  0.75         0            0            as above
    4  1            0            0            point

Wing "Engine_Pylon_Port"
  location (X Y Z) 0 0 0, rotation -90 0 0
  symmetric about XZ
  bounding box size 5.1547 0.360433 2
  totals: TotalSpan=4 TotalProjectedSpan=4 TotalChord=4.25 TotalArea=17 TotalAR=0.941176 MAC=4.2549
  root: chord 4.5, twist 0, NACA 4-series Camber=0 CamberLoc=0.2 ThickChord=0.08
  sections:
    n  Span  Root_Chord  Tip_Chord  Area  Sweep  Sweep_Location  Dihedral  Twist  Twist_Location  tip airfoil
    1  2     4.5         4          8.5   30     0               0         0      0.25            as above

Fuselage "Turbofan_Engine_Stbd"
  location (X Y Z) 0 0 0, rotation 0 0 0
  bounding box size 7 3.4 3.4
  Design: Length=7
  cross sections:
    n  XLocPercent  YLocPercent  ZLocPercent  shape
    0  0            0            0            point
    1  0.25         0            0            ellipse Ellipse_Height=3.4 Ellipse_Width=3.4
    2  0.5          0            0            as above
    3  0.75         0            0            as above
    4  1            0            0            point

Wing "Engine_Pylon_Stbd"
  location (X Y Z) 0 0 0, rotation 90 0 0
  symmetric about XZ
  bounding box size 5.1547 0.360433 2
  totals: TotalSpan=4 TotalProjectedSpan=4 TotalChord=4.25 TotalArea=17 TotalAR=0.941176 MAC=4.2549
  root: chord 4.5, twist 0, NACA 4-series Camber=0 CamberLoc=0.2 ThickChord=0.08
  sections:
    n  Span  Root_Chord  Tip_Chord  Area  Sweep  Sweep_Location  Dihedral  Twist  Twist_Location  tip airfoil
    1  2     4.5         4          8.5   30     0               0         0      0.25            as above

Fuselage "Unified_430Pax_Theater_Cabin"
  location (X Y Z) 0 0 0, rotation 0 0 0
  bounding box size 20 14 3.04138
  Design: Length=20
  cross sections:
    n  XLocPercent  YLocPercent  ZLocPercent  shape
    0  0            0            0            point
    1  0.25         0            0            ellipse Ellipse_Height=2.4 Ellipse_Width=14
    2  0.5          0            0            as above
    3  0.75         0            0            as above
    4  1            0            0            point

Fuselage "LH2_Tank_Outboard_Fwd_Port"
  location (X Y Z) 0 0 0, rotation 0 0 0
  bounding box size 12.5 3.3 3.3
  Design: Length=12.5
  cross sections:
    n  XLocPercent  YLocPercent  ZLocPercent  shape
    0  0            0            0            point
    1  0.25         0            0            ellipse Ellipse_Height=3.3 Ellipse_Width=3.3
    2  0.5          0            0            as above
    3  0.75         0            0            as above
    4  1            0            0            point

Fuselage "LH2_Tank_Outboard_Fwd_Stbd"
  location (X Y Z) 0 0 0, rotation 0 0 0
  bounding box size 12.5 3.3 3.3
  Design: Length=12.5
  cross sections:
    n  XLocPercent  YLocPercent  ZLocPercent  shape
    0  0            0            0            point
    1  0.25         0            0            ellipse Ellipse_Height=3.3 Ellipse_Width=3.3
    2  0.5          0            0            as above
    3  0.75         0            0            as above
    4  1            0            0            point

Fuselage "LH2_Tank_Outboard_Mid_Port"
  location (X Y Z) 0 0 0, rotation 0 0 0
  bounding box size 12 3.1 3.1
  Design: Length=12
  cross sections:
    n  XLocPercent  YLocPercent  ZLocPercent  shape
    0  0            0            0            point
    1  0.25         0            0            ellipse Ellipse_Height=3.1 Ellipse_Width=3.1
    2  0.5          0            0            as above
    3  0.75         0            0            as above
    4  1            0            0            point

Fuselage "LH2_Tank_Outboard_Mid_Stbd"
  location (X Y Z) 0 0 0, rotation 0 0 0
  bounding box size 12 3.1 3.1
  Design: Length=12
  cross sections:
    n  XLocPercent  YLocPercent  ZLocPercent  shape
    0  0            0            0            point
    1  0.25         0            0            ellipse Ellipse_Height=3.1 Ellipse_Width=3.1
    2  0.5          0            0            as above
    3  0.75         0            0            as above
    4  1            0            0            point

Fuselage "LH2_Tank_Aft_Core_Port"
  location (X Y Z) 0 0 0, rotation 0 0 0
  bounding box size 14 4.3 4.3
  Design: Length=14
  cross sections:
    n  XLocPercent  YLocPercent  ZLocPercent  shape
    0  0            0            0            point
    1  0.25         0            0            ellipse Ellipse_Height=4.3 Ellipse_Width=4.3
    2  0.5          0            0            as above
    3  0.75         0            0            as above
    4  1            0            0            point

Fuselage "LH2_Tank_Aft_Core_Stbd"
  location (X Y Z) 0 0 0, rotation 0 0 0
  bounding box size 14 4.3 4.3
  Design: Length=14
  cross sections:
    n  XLocPercent  YLocPercent  ZLocPercent  shape
    0  0            0            0            point
    1  0.25         0            0            ellipse Ellipse_Height=4.3 Ellipse_Width=4.3
    2  0.5          0            0            as above
    3  0.75         0            0            as above
    4  1            0            0            point

Fuselage "Nose_Gear_Strut"
  location (X Y Z) 0 0 0, rotation 0 0 0
  bounding box size 5 1.2 1.2
  Design: Length=5
  cross sections:
    n  XLocPercent  YLocPercent  ZLocPercent  shape
    0  0            0            0            point
    1  0.25         0            0            ellipse Ellipse_Height=1.2 Ellipse_Width=1.2
    2  0.5          0            0            as above
    3  0.75         0            0            as above
    4  1            0            0            point

Fuselage "Main_Gear_Strut_Port"
  location (X Y Z) 0 0 0, rotation 0 0 0
  bounding box size 5 1.8 1.8
  Design: Length=5
  cross sections:
    n  XLocPercent  YLocPercent  ZLocPercent  shape
    0  0            0            0            point
    1  0.25         0            0            ellipse Ellipse_Height=1.8 Ellipse_Width=1.8
    2  0.5          0            0            as above
    3  0.75         0            0            as above
    4  1            0            0            point

Fuselage "Main_Gear_Strut_Stbd"
  location (X Y Z) 0 0 0, rotation 0 0 0
  bounding box size 5 1.8 1.8
  Design: Length=5
  cross sections:
    n  XLocPercent  YLocPercent  ZLocPercent  shape
    0  0            0            0            point
    1  0.25         0            0            ellipse Ellipse_Height=1.8 Ellipse_Width=1.8
    2  0.5          0            0            as above
    3  0.75         0            0            as above
    4  1            0            0            point
