OpenVSP model (file version 5), 15 components.
Geometry view with OpenVSP parameter names; values to 6 digits, angles in degrees, lengths in the model's unit.
Overall bounding box: X_Min=0 X_Len=69.172 Y_Min=-29.2473 Y_Len=58.4947 Z_Min=-3.025 Z_Len=15.625

Fuselage "Fuselage_MainDeck"
  location (X Y Z) 0 0 0, rotation 0 0 0
  bounding box size 68.5 6.2 5.4
  Design: Length=68.5
  cross sections:
    n  XLocPercent  YLocPercent  ZLocPercent  shape
    0  0            0            0            point
    1  0.12         0            0            ellipse Ellipse_Height=4.8 Ellipse_Width=4.8
    2  0.5          0            0            ellipse Ellipse_Height=5.4 Ellipse_Width=6.2
    3  0.85         0            0            ellipse Ellipse_Height=4.5 Ellipse_Width=4.5
    4  1            0            0            point

Fuselage "LH2_Tank_1_Crown_Fwd"
  location (X Y Z) 7.2 0 2.15, rotation 0 0 0
  bounding box size 12.372 3.093 3.093
  Design: Length=12.372
  cross sections:
    n  XLocPercent  YLocPercent  ZLocPercent  shape
    0  0            0            0            point
    1  0.25         0            0            circle Circle_Diameter=3.093
    2  0.5          0            0            as above
    3  0.75         0            0            as above
    4  1            0            0            point

Fuselage "LH2_Tank_2_Crown_MidFwd"
  location (X Y Z) 19.6 0 2.15, rotation 0 0 0
  bounding box size 12.372 3.093 3.093
  Design: Length=12.372
  cross sections:
    n  XLocPercent  YLocPercent  ZLocPercent  shape
    0  0            0            0            point
    1  0.25         0            0            circle Circle_Diameter=3.093
    2  0.5          0            0            as above
    3  0.75         0            0            as above
    4  1            0            0            point

Fuselage "LH2_Tank_3_Crown_Center"
  location (X Y Z) 32 0 2.15, rotation 0 0 0
  bounding box size 12.372 3.093 3.093
  Design: Length=12.372
  cross sections:
    n  XLocPercent  YLocPercent  ZLocPercent  shape
    0  0            0            0            point
    1  0.25         0            0            circle Circle_Diameter=3.093
    2  0.5          0            0            as above
    3  0.75         0            0            as above
    4  1            0            0            point

Fuselage "LH2_Tank_4_Crown_MidAft"
  location (X Y Z) 44.4 0 2.15, rotation 0 0 0
  bounding box size 12.372 3.093 3.093
  Design: Length=12.372
  cross sections:
    n  XLocPercent  YLocPercent  ZLocPercent  shape
    0  0            0            0            point
    1  0.25         0            0            circle Circle_Diameter=3.093
    2  0.5          0            0            as above
    3  0.75         0            0            as above
    4  1            0            0            point

Fuselage "LH2_Tank_5_Crown_Aft"
  location (X Y Z) 56.8 0 2.15, rotation 0 0 0
  bounding box size 12.372 3.093 3.093
  Design: Length=12.372
  cross sections:
    n  XLocPercent  YLocPercent  ZLocPercent  shape
    0  0            0            0            point
    1  0.25         0            0            circle Circle_Diameter=3.093
    2  0.5          0            0            as above
    3  0.75         0            0            as above
    4  1            0            0            point

Fuselage "LH2_Tank_6_WingRoot_Port"
  location (X Y Z) 27.5 -2.1 -0.2, rotation 0 0 0
  bounding box size 12.372 3.093 3.093
  Design: Length=12.372
  cross sections:
    n  XLocPercent  YLocPercent  ZLocPercent  shape
    0  0            0            0            point
    1  0.25         0            0            circle Circle_Diameter=3.093
    2  0.5          0            0            as above
    3  0.75         0            0            as above
    4  1            0            0            point

Fuselage "LH2_Tank_7_WingRoot_Stbd"
  location (X Y Z) 27.5 2.1 -0.2, rotation 0 0 0
  bounding box size 12.372 3.093 3.093
  Design: Length=12.372
  cross sections:
    n  XLocPercent  YLocPercent  ZLocPercent  shape
    0  0            0            0            point
    1  0.25         0            0            circle Circle_Diameter=3.093
    2  0.5          0            0            as above
    3  0.75         0            0            as above
    4  1            0            0            point

Wing "MainWing_Transonic"
  location (X Y Z) 26.5 0 -1.2, rotation 0 0 0
  symmetric about XZ
  bounding box size 20.3864 58.4947 3.43076
  totals: TotalSpan=58.75 TotalProjectedSpan=58.4795 TotalChord=5.8 TotalArea=340.75 TotalAR=10.0363 MAC=6.46437
  root: chord 9.2, twist 0, NACA 4-series Camber=0.02 CamberLoc=0.2 ThickChord=0.135
  sections:
    n  Span    Root_Chord  Tip_Chord  Area     Sweep  Sweep_Location  Dihedral  Twist  Twist_Location  tip airfoil
    1  29.375  9.2         2.4        170.375  29     0.25            5.5       0      0.25            NACA 4-series Camber=0.02 CamberLoc=0.2 ThickChord=0.105

Wing "HorizontalTail"
  location (X Y Z) 58.5 0 2.2, rotation 0 0 0
  symmetric about XZ
  bounding box size 8.43172 19.4151 1.40534
  totals: TotalSpan=19.5 TotalProjectedSpan=19.3932 TotalChord=3.85 TotalArea=75.075 TotalAR=5.00959 MAC=4.11515
  root: chord 5.6, twist 0, NACA 4-series Camber=0 CamberLoc=0.2 ThickChord=0.1
  sections:
    n  Span  Root_Chord  Tip_Chord  Area     Sweep  Sweep_Location  Dihedral  Twist  Twist_Location  tip airfoil
    1  9.75  5.6         2.1        37.5375  33     0               6         0      0.25            as above

Wing "VerticalTail"
  location (X Y Z) 51 0 2.8, rotation 90 0 0
  bounding box size 10.4566 0.780453 9.8
  totals: TotalSpan=9.8 TotalProjectedSpan=9.8 TotalChord=5.3 TotalArea=51.94 TotalAR=1.84906 MAC=5.69308
  root: chord 7.8, twist 0, NACA 4-series Camber=0 CamberLoc=0.2 ThickChord=0.1
  sections:
    n  Span  Root_Chord  Tip_Chord  Area   Sweep  Sweep_Location  Dihedral  Twist  Twist_Location  tip airfoil
    1  9.8   7.8         2.8        51.94  38     0               0         0      0.25            as above

Fuselage "Engine_Inboard_Port"
  location (X Y Z) 24.5 -9.5 -1.8, rotation 0 0 0
  bounding box size 4.8 2.45 2.45
  Design: Length=4.8
  cross sections:
    n  XLocPercent  YLocPercent  ZLocPercent  shape
    0  0            0            0            point
    1  0.25         0            0            circle Circle_Diameter=2.45
    2  0.5          0            0            as above
    3  0.75         0            0            as above
    4  1            0            0            point

Fuselage "Engine_Inboard_Stbd"
  location (X Y Z) 24.5 9.5 -1.8, rotation 0 0 0
  bounding box size 4.8 2.45 2.45
  Design: Length=4.8
  cross sections:
    n  XLocPercent  YLocPercent  ZLocPercent  shape
    0  0            0            0            point
    1  0.25         0            0            circle Circle_Diameter=2.45
    2  0.5          0            0            as above
    3  0.75         0            0            as above
    4  1            0            0            point

Fuselage "Engine_Outboard_Port"
  location (X Y Z) 31 -17.8 -0.9, rotation 0 0 0
  bounding box size 4.8 2.45 2.45
  Design: Length=4.8
  cross sections:
    n  XLocPercent  YLocPercent  ZLocPercent  shape
    0  0            0            0            point
    1  0.25         0            0            circle Circle_Diameter=2.45
    2  0.5          0            0            as above
    3  0.75         0            0            as above
    4  1            0            0            point

Fuselage "Engine_Outboard_Stbd"
  location (X Y Z) 31 17.8 -0.9, rotation 0 0 0
  bounding box size 4.8 2.45 2.45
  Design: Length=4.8
  cross sections:
    n  XLocPercent  YLocPercent  ZLocPercent  shape
    0  0            0            0            point
    1  0.25         0            0            circle Circle_Diameter=2.45
    2  0.5          0            0            as above
    3  0.75         0            0            as above
    4  1            0            0            point
