OpenVSP model (file version 5), 15 components.
Geometry view with OpenVSP parameter names; values to 6 digits, angles in degrees, lengths in the model's unit.
Overall bounding box: X_Min=-0.0212129 X_Len=35.2212 Y_Min=-33.3193 Y_Len=66.6386 Z_Min=-2.26667 Z_Len=7.85477

Wing "BWB_Airframe_Main"
  location (X Y Z) 0 0 0, rotation 0 0 0
  symmetric about XZ
  bounding box size 32.0212 64.9022 5.60406
  totals: TotalSpan=65 TotalProjectedSpan=64.8818 TotalChord=8.53333 TotalArea=561 TotalAR=7.50382 MAC=18.523
  root: chord 32, twist 0, NACA 4-series Camber=0.02 CamberLoc=0.2 ThickChord=0.175
  sections:
    n  Span  Root_Chord  Tip_Chord  Area     Sweep  Sweep_Location  Dihedral  Twist  Twist_Location  tip airfoil
    1  6.5   32          22         22.5     42     0               0         0      0.25            NACA 4-series Camber=0.02 CamberLoc=0.2 ThickChord=0.16
    2  8.5   22          10.5       138.125  36     0               2         0      0.25            NACA 4-series Camber=0.015 CamberLoc=0.2 ThickChord=0.13
    3  17.5  10.5        3.2        119.875  30     0               4.5       0      0.25            NACA 4-series Camber=0.012 CamberLoc=0.2 ThickChord=0.105

Fuselage "BWB_LH2_Tank_Center"
  location (X Y Z) 12 0 0.4, rotation 0 0 0
  bounding box size 12.37 3.09 3.09
  Design: Length=12.37
  cross sections:
    n  XLocPercent  YLocPercent  ZLocPercent  shape
    0  0            0            0            point
    1  0.25         0            0            circle Circle_Diameter=3.09
    2  0.5          0            0            as above
    3  0.75         0            0            as above
    4  1            0            0            point

Fuselage "BWB_LH2_Tank_Port_Inner"
  location (X Y Z) 14.5 -3.5 0.3, rotation 0 0 0
  bounding box size 12.37 3.09 3.09
  Design: Length=12.37
  cross sections:
    n  XLocPercent  YLocPercent  ZLocPercent  shape
    0  0            0            0            point
    1  0.25         0            0            circle Circle_Diameter=3.09
    2  0.5          0            0            as above
    3  0.75         0            0            as above
    4  1            0            0            point

Fuselage "BWB_LH2_Tank_Stbd_Inner"
  location (X Y Z) 14.5 3.5 0.3, rotation 0 0 0
  bounding box size 12.37 3.09 3.09
  Design: Length=12.37
  cross sections:
    n  XLocPercent  YLocPercent  ZLocPercent  shape
    0  0            0            0            point
    1  0.25         0            0            circle Circle_Diameter=3.09
    2  0.5          0            0            as above
    3  0.75         0            0            as above
    4  1            0            0            point

Fuselage "BWB_LH2_Tank_Port_Outer"
  location (X Y Z) 17 -7 0.2, rotation 0 0 0
  bounding box size 12.37 3.09 3.09
  Design: Length=12.37
  cross sections:
    n  XLocPercent  YLocPercent  ZLocPercent  shape
    0  0            0            0            point
    1  0.25         0            0            circle Circle_Diameter=3.09
    2  0.5          0            0            as above
    3  0.75         0            0            as above
    4  1            0            0            point

Fuselage "BWB_LH2_Tank_Stbd_Outer"
  location (X Y Z) 17 7 0.2, rotation 0 0 0
  bounding box size 12.37 3.09 3.09
  Design: Length=12.37
  cross sections:
    n  XLocPercent  YLocPercent  ZLocPercent  shape
    0  0            0            0            point
    1  0.25         0            0            circle Circle_Diameter=3.09
    2  0.5          0            0            as above
    3  0.75         0            0            as above
    4  1            0            0            point

Fuselage "BWB_LH2_Tank_Aft_Port"
  location (X Y Z) 20 -3.5 0.3, rotation 0 0 0
  bounding box size 12.37 3.09 3.09
  Design: Length=12.37
  cross sections:
    n  XLocPercent  YLocPercent  ZLocPercent  shape
    0  0            0            0            point
    1  0.25         0            0            circle Circle_Diameter=3.09
    2  0.5          0            0            as above
    3  0.75         0            0            as above
    4  1            0            0            point

Fuselage "BWB_LH2_Tank_Aft_Stbd"
  location (X Y Z) 20 3.5 0.3, rotation 0 0 0
  bounding box size 12.37 3.09 3.09
  Design: Length=12.37
  cross sections:
    n  XLocPercent  YLocPercent  ZLocPercent  shape
    0  0            0            0            point
    1  0.25         0            0            circle Circle_Diameter=3.09
    2  0.5          0            0            as above
    3  0.75         0            0            as above
    4  1            0            0            point

Pod "BWB_Passenger_Floor_430Pax"
  location (X Y Z) 8 0 0, rotation 0 0 0
  bounding box size 18.5 2.46667 2.46667
  Design: FineRatio=15 Length=18.5

Pod "BWB_Cargo_Hold_44_LD3"
  location (X Y Z) 10 0 -1.2, rotation 0 0 0
  bounding box size 16 2.13333 2.13333
  Design: FineRatio=15 Length=16

Fuselage "BWB_Engine_Port_Inboard"
  location (X Y Z) 24.5 -3.2 1.8, rotation 0 0 0
  bounding box size 4.8 2.45 2.45
  Design: Length=4.8
  cross sections:
    n  XLocPercent  YLocPercent  ZLocPercent  shape
    0  0            0            0            point
    1  0.25         0            0            circle Circle_Diameter=2.45
    2  0.5          0            0            as above
    3  0.75         0            0            as above
    4  1            0            0            point

Fuselage "BWB_Engine_Stbd_Inboard"
  location (X Y Z) 24.5 3.2 1.8, rotation 0 0 0
  bounding box size 4.8 2.45 2.45
  Design: Length=4.8
  cross sections:
    n  XLocPercent  YLocPercent  ZLocPercent  shape
    0  0            0            0            point
    1  0.25         0            0            circle Circle_Diameter=2.45
    2  0.5          0            0            as above
    3  0.75         0            0            as above
    4  1            0            0            point

Fuselage "BWB_Engine_Port_Outboard"
  location (X Y Z) 26 -7.2 1.6, rotation 0 0 0
  bounding box size 4.8 2.45 2.45
  Design: Length=4.8
  cross sections:
    n  XLocPercent  YLocPercent  ZLocPercent  shape
    0  0            0            0            point
    1  0.25         0            0            circle Circle_Diameter=2.45
    2  0.5          0            0            as above
    3  0.75         0            0            as above
    4  1            0            0            point

Fuselage "BWB_Engine_Stbd_Outboard"
  location (X Y Z) 26 7.2 1.6, rotation 0 0 0
  bounding box size 4.8 2.45 2.45
  Design: Length=4.8
  cross sections:
    n  XLocPercent  YLocPercent  ZLocPercent  shape
    0  0            0            0            point
    1  0.25         0            0            circle Circle_Diameter=2.45
    2  0.5          0            0            as above
    3  0.75         0            0            as above
    4  1            0            0            point

Wing "BWB_Winglets"
  location (X Y Z) 29.5 32 1.2, rotation 75 0 0
  symmetric about XZ
  bounding box size 5.7 66.6386 4.42954
  totals: TotalSpan=9 TotalProjectedSpan=9 TotalChord=2.2 TotalArea=19.8 TotalAR=4.09091 MAC=2.35152
  root: chord 3.2, twist 0, NACA 4-series Camber=0 CamberLoc=0.2 ThickChord=0.1
  sections:
    n  Span  Root_Chord  Tip_Chord  Area  Sweep  Sweep_Location  Dihedral  Twist  Twist_Location  tip airfoil
    1  4.5   3.2         1.2        9.9   45     0               0         0      0.25            as above
