OpenVSP model (file version 5), 32 components.
Geometry view with OpenVSP parameter names; values to 6 digits, angles in degrees, lengths in the model's unit.
Overall bounding box: X_Min=0 X_Len=69.07 Y_Min=-29.2513 Y_Len=58.5025 Z_Min=-3.81667 Z_Len=16.2167

Fuselage "Fuselage_OML_Translucent"
  location (X Y Z) 0 0 0, rotation 0 0 0
  bounding box size 68.5 6.2 6.9
  Design: Length=68.5
  cross sections:
    n  XLocPercent  YLocPercent  ZLocPercent  shape
    0  0            0            0            point
    1  0.1          0            0            ellipse Ellipse_Height=5.8 Ellipse_Width=5.2
    2  0.5          0            0            ellipse Ellipse_Height=6.9 Ellipse_Width=6.2
    3  0.86         0            0            ellipse Ellipse_Height=4.6 Ellipse_Width=4.4
    4  1            0            0            point

Pod "Main_Cabin_Floor_Deck"
  location (X Y Z) 8 0 -0.35, rotation 0 0 0
  bounding box size 52 6.93333 6.93333
  Design: FineRatio=15 Length=52

Pod "SeatRow_Biz_1"
  location (X Y Z) 9.5 0 0.15, rotation 0 0 0
  bounding box size 1.2 0.16 0.16
  Design: FineRatio=15 Length=1.2

Pod "SeatRow_Biz_2"
  location (X Y Z) 11 0 0.15, rotation 0 0 0
  bounding box size 1.2 0.16 0.16
  Design: FineRatio=15 Length=1.2

Pod "SeatRow_Biz_3"
  location (X Y Z) 12.5 0 0.15, rotation 0 0 0
  bounding box size 1.2 0.16 0.16
  Design: FineRatio=15 Length=1.2

Pod "SeatRow_Biz_4"
  location (X Y Z) 14 0 0.15, rotation 0 0 0
  bounding box size 1.2 0.16 0.16
  Design: FineRatio=15 Length=1.2

Pod "SeatCluster_Econ_1"
  location (X Y Z) 17 0 0.15, rotation 0 0 0
  bounding box size 2.8 0.373333 0.373333
  Design: FineRatio=15 Length=2.8

Pod "SeatCluster_Econ_2"
  location (X Y Z) 20.1 0 0.15, rotation 0 0 0
  bounding box size 2.8 0.373333 0.373333
  Design: FineRatio=15 Length=2.8

Pod "SeatCluster_Econ_3"
  location (X Y Z) 23.2 0 0.15, rotation 0 0 0
  bounding box size 2.8 0.373333 0.373333
  Design: FineRatio=15 Length=2.8

Pod "SeatCluster_Econ_4"
  location (X Y Z) 26.3 0 0.15, rotation 0 0 0
  bounding box size 2.8 0.373333 0.373333
  Design: FineRatio=15 Length=2.8

Pod "SeatCluster_Econ_5"
  location (X Y Z) 29.4 0 0.15, rotation 0 0 0
  bounding box size 2.8 0.373333 0.373333
  Design: FineRatio=15 Length=2.8

Pod "SeatCluster_Econ_6"
  location (X Y Z) 32.5 0 0.15, rotation 0 0 0
  bounding box size 2.8 0.373333 0.373333
  Design: FineRatio=15 Length=2.8

Pod "SeatCluster_Econ_7"
  location (X Y Z) 35.6 0 0.15, rotation 0 0 0
  bounding box size 2.8 0.373333 0.373333
  Design: FineRatio=15 Length=2.8

Pod "SeatCluster_Econ_8"
  location (X Y Z) 38.7 0 0.15, rotation 0 0 0
  bounding box size 2.8 0.373333 0.373333
  Design: FineRatio=15 Length=2.8

Pod "SeatCluster_Econ_9"
  location (X Y Z) 41.8 0 0.15, rotation 0 0 0
  bounding box size 2.8 0.373333 0.373333
  Design: FineRatio=15 Length=2.8

Pod "SeatCluster_Econ_10"
  location (X Y Z) 44.9 0 0.15, rotation 0 0 0
  bounding box size 2.8 0.373333 0.373333
  Design: FineRatio=15 Length=2.8

Pod "SeatCluster_Econ_11"
  location (X Y Z) 48 0 0.15, rotation 0 0 0
  bounding box size 2.8 0.373333 0.373333
  Design: FineRatio=15 Length=2.8

Pod "SeatCluster_Econ_12"
  location (X Y Z) 51.1 0 0.15, rotation 0 0 0
  bounding box size 2.8 0.373333 0.373333
  Design: FineRatio=15 Length=2.8

Pod "CargoHold_Fwd_24_LD3"
  location (X Y Z) 12 0 -1.4, rotation 0 0 0
  bounding box size 13.5 1.8 1.8
  Design: FineRatio=15 Length=13.5

Pod "CargoHold_Aft_20_LD3"
  location (X Y Z) 36.5 0 -1.4, rotation 0 0 0
  bounding box size 11.5 1.53333 1.53333
  Design: FineRatio=15 Length=11.5

Fuselage "LH2_Tank_1_D3.09m_L12.37m"
  location (X Y Z) 7.5 0 1.6, rotation 0 0 0
  bounding box size 12.37 3.09 3.09
  Design: Length=12.37
  cross sections:
    n  XLocPercent  YLocPercent  ZLocPercent  shape
    0  0            0            0            point
    1  0.25         0            0            circle Circle_Diameter=3.09
    2  0.5          0            0            as above
    3  0.75         0            0            as above
    4  1            0            0            point

Fuselage "LH2_Tank_2_D3.09m_L12.37m"
  location (X Y Z) 19.8 0 1.6, rotation 0 0 0
  bounding box size 12.37 3.09 3.09
  Design: Length=12.37
  cross sections:
    n  XLocPercent  YLocPercent  ZLocPercent  shape
    0  0            0            0            point
    1  0.25         0            0            circle Circle_Diameter=3.09
    2  0.5          0            0            as above
    3  0.75         0            0            as above
    4  1            0            0            point

Fuselage "LH2_Tank_3_D3.09m_L12.37m"
  location (X Y Z) 32.1 0 1.6, rotation 0 0 0
  bounding box size 12.37 3.09 3.09
  Design: Length=12.37
  cross sections:
    n  XLocPercent  YLocPercent  ZLocPercent  shape
    0  0            0            0            point
    1  0.25         0            0            circle Circle_Diameter=3.09
    2  0.5          0            0            as above
    3  0.75         0            0            as above
    4  1            0            0            point

Fuselage "LH2_Tank_4_D3.09m_L12.37m"
  location (X Y Z) 44.4 0 1.6, rotation 0 0 0
  bounding box size 12.37 3.09 3.09
  Design: Length=12.37
  cross sections:
    n  XLocPercent  YLocPercent  ZLocPercent  shape
    0  0            0            0            point
    1  0.25         0            0            circle Circle_Diameter=3.09
    2  0.5          0            0            as above
    3  0.75         0            0            as above
    4  1            0            0            point

Fuselage "LH2_Tank_5_D3.09m_L12.37m"
  location (X Y Z) 56.7 0 1.6, rotation 0 0 0
  bounding box size 12.37 3.09 3.09
  Design: Length=12.37
  cross sections:
    n  XLocPercent  YLocPercent  ZLocPercent  shape
    0  0            0            0            point
    1  0.25         0            0            circle Circle_Diameter=3.09
    2  0.5          0            0            as above
    3  0.75         0            0            as above
    4  1            0            0            point

Wing "MainWing_Span58.75m_Area363m2"
  location (X Y Z) 26.5 0 -1.2, rotation 0 0 0
  symmetric about XZ
  bounding box size 18.6828 58.5025 3.39738
  totals: TotalSpan=58.75 TotalProjectedSpan=58.4795 TotalChord=5.8 TotalArea=340.75 TotalAR=10.0363 MAC=6.46437
  root: chord 9.2, twist 0, NACA 4-series Camber=0 CamberLoc=0.2 ThickChord=0.1
  sections:
    n  Span    Root_Chord  Tip_Chord  Area     Sweep  Sweep_Location  Dihedral  Twist  Twist_Location  tip airfoil
    1  29.375  9.2         2.4        170.375  29     0               5.5       0      0.25            as above

Wing "HTail_Span19.5m_Area71m2"
  location (X Y Z) 58.5 0 1.8, rotation 0 0 0
  symmetric about XZ
  bounding box size 8.43172 19.5 0.560325
  totals: TotalSpan=19.5 TotalProjectedSpan=19.5 TotalChord=3.85 TotalArea=75.075 TotalAR=5.06494 MAC=4.11515
  root: chord 5.6, twist 0, NACA 4-series Camber=0 CamberLoc=0.2 ThickChord=0.1
  sections:
    n  Span  Root_Chord  Tip_Chord  Area     Sweep  Sweep_Location  Dihedral  Twist  Twist_Location  tip airfoil
    1  9.75  5.6         2.1        37.5375  33     0               0         0      0.25            as above

Wing "VTail_Height9.8m_Area52m2"
  location (X Y Z) 51 0 2.6, rotation 90 0 0
  bounding box size 10.4566 0.780453 9.8
  totals: TotalSpan=9.8 TotalProjectedSpan=9.8 TotalChord=5.3 TotalArea=51.94 TotalAR=1.84906 MAC=5.69308
  root: chord 7.8, twist 0, NACA 4-series Camber=0 CamberLoc=0.2 ThickChord=0.1
  sections:
    n  Span  Root_Chord  Tip_Chord  Area   Sweep  Sweep_Location  Dihedral  Twist  Twist_Location  tip airfoil
    1  9.8   7.8         2.8        51.94  38     0               0         0      0.25            as above

Fuselage "Turbofan_Port_In"
  location (X Y Z) 24.5 -9.5 -1.8, rotation 0 0 0
  bounding box size 4.8 2.45 2.45
  Design: Length=4.8
  cross sections:
    n  XLocPercent  YLocPercent  ZLocPercent  shape
    0  0            0            0            point
    1  0.25         0            0            circle Circle_Diameter=2.45
    2  0.5          0            0            as above
    3  0.75         0            0            as above
    4  1            0            0            point

Fuselage "Turbofan_Stbd_In"
  location (X Y Z) 24.5 9.5 -1.8, rotation 0 0 0
  bounding box size 4.8 2.45 2.45
  Design: Length=4.8
  cross sections:
    n  XLocPercent  YLocPercent  ZLocPercent  shape
    0  0            0            0            point
    1  0.25         0            0            circle Circle_Diameter=2.45
    2  0.5          0            0            as above
    3  0.75         0            0            as above
    4  1            0            0            point

Fuselage "Turbofan_Port_Out"
  location (X Y Z) 31 -17.8 -0.9, rotation 0 0 0
  bounding box size 4.8 2.45 2.45
  Design: Length=4.8
  cross sections:
    n  XLocPercent  YLocPercent  ZLocPercent  shape
    0  0            0            0            point
    1  0.25         0            0            circle Circle_Diameter=2.45
    2  0.5          0            0            as above
    3  0.75         0            0            as above
    4  1            0            0            point

Fuselage "Turbofan_Stbd_Out"
  location (X Y Z) 31 17.8 -0.9, rotation 0 0 0
  bounding box size 4.8 2.45 2.45
  Design: Length=4.8
  cross sections:
    n  XLocPercent  YLocPercent  ZLocPercent  shape
    0  0            0            0            point
    1  0.25         0            0            circle Circle_Diameter=2.45
    2  0.5          0            0            as above
    3  0.75         0            0            as above
    4  1            0            0            point
