OpenVSP model (file version 5), 38 components.
Geometry view with OpenVSP parameter names; values to 6 digits, angles in degrees, lengths in the model's unit.
Overall bounding box: X_Min=-15.5 X_Len=52.663 Y_Min=-39.6583 Y_Len=79.3166 Z_Min=-5.65911 Z_Len=14.7708

Wing "Aether_wing"
  location (X Y Z) 0 0 0, rotation 0 0 0
  symmetric about XZ
  bounding box size 49.943 79.3166 12.2897
  totals: TotalSpan=83.7864 TotalProjectedSpan=79.2419 TotalChord=16.8501 TotalArea=1057.58 TotalAR=5.93741 MAC=25.4413
  root: chord 51.9478, twist -0.15748, airfoil file "NASA SC(2)-0408 Reflexed BWB (8.0%)"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 BaseThickChord=0.080378 DeltaX=-0.24 DeltaY=0.0142857 Scale=0.946607 ThickChord=0.230378
  sections:
    n  Span     Root_Chord  Tip_Chord  Area     Sweep    Sweep_Location  Dihedral  Twist  Twist_Location  tip airfoil
    1  5.66124  51.9478     31.1041    235.088  54.0714  0.1             0         0      0.25            NACA 4-series Camber=0 CamberLoc=0.2 DeltaX=-0.02 Scale=0.857143 ThickChord=0.295714
    2  9.05799  31.1041     7.71075    175.792  45.7857  0               0         0      0.25            NACA 4-series Camber=0 CamberLoc=0.2 ThickChord=0.256286
    3  22.645   7.71075     2.07278    110.774  28       0               1.5       -2.5   0.25            airfoil file "NASA SC(2)-0410 Reflexed BWB (9.5%)"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 BaseThickChord=0.0954687 ThickChord=0.0954687
    4  4.52899  2.07278     1.07785    7.13459  45       0               60        0      0.25            airfoil file "NASA SC(2)-0408 Reflexed BWB (8.0%)"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 BaseThickChord=0.080378 ThickChord=0.080378
  SS_Control "Elevon_Inboard": EtaStart=0.0343137 EtaEnd=0.0980392 Length_C_Start=0.138889 Length_C_End=0.138889 Length_Start=6.69195 Length_End=5.77042 LE_Flag=0 Surf_Type=2
  SS_Control "Elevon_Mid": EtaStart=0.431373 EtaEnd=0.55 Length_C_Start=0.25 Length_C_End=0.25 Length_Start=1.55016 Length_End=1.11207 LE_Flag=0 Surf_Type=2
  SS_Control "Elevon_Outboard": EtaStart=0.58 EtaEnd=0.88 Length_C_Start=0.28 Length_C_End=0.28 Length_Start=1.14495 Length_End=0.583757 LE_Flag=0 Surf_Type=2
  SS_Control "LE_Slats": UStart=0.512712 UEnd=0.618644 Length_C_Start=0.15 Length_C_End=0.15 Length_Start=1.07402 Length_End=0.567568 LE_Flag=1 Surf_Type=2
  SS_Control "Winglet_Rudder": UStart=0.93 UEnd=0.98 Length_C_Start=0.3 Length_C_End=0.3 Length_Start=0.403978 Length_End=0.34476 LE_Flag=0 Surf_Type=2

Custom "Duct", child of "Aether_wing"
  location (X Y Z) 23.5 4.84783 6.84348, rotation 0 0 0
  symmetric about XZ
  bounding box size 6.5 14.1711 4.53638
  Design: Camber=0 CamberLoc=0.2 Chord=6.5 Height=3.5 InvertFlag=0 Shape=0 ThickChord=0.15 Width=3.5
  custom script Duct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

Wing "pylons", child of "Aether_wing"
  location (X Y Z) 17.5858 4.8617 2.49344, rotation 89.7541 1.30158 -9.48276
  symmetric about XZ
  bounding box size 8.79948 10.4979 4.51443
  totals: TotalSpan=6.34803 TotalProjectedSpan=6.34803 TotalChord=4.9 TotalArea=31.1054 TotalAR=1.29552 MAC=4.90564
  root: chord 5.2, twist 0, NACA 4-series Camber=0 CamberLoc=0.2 DeltaX=-0.442857 ShiftLE=-0.00714286 ThickChord=0.08
  sections:
    n  Span     Root_Chord  Tip_Chord  Area     Sweep  Sweep_Location  Dihedral  Twist  Twist_Location  tip airfoil
    1  3.17402  5.2         4.6        15.5527  25     0               0         0      0.25            NACA 4-series Camber=0 CamberLoc=0.2 ThickChord=0.1

Pod "Tank_Main_Inboard", child of "Aether_wing"
  location (X Y Z) 11.9913 6.96087 0.026087, rotation 0 0 0
  symmetric about XZ
  bounding box size 20.4091 18.9295 5.00781
  Design: FineRatio=8.15091 Length=20.4091

Custom "Cabin_Seats_Economy_Upward", child of "Aether_wing"
  location (X Y Z) -2.06087 -2.84348 2.6087, rotation 0 0 0
  bounding box size 15.5568 6.02582 1.30447
  Layout: AisleWidth=0.30591 NumLeft=3 NumMiddle=4 NumRight=3 NumRow=19 SeatGap=0.046 SeatPitch=0.81
  Design: BackAngle=25 BackHeight=1 BackThick=0.1 SeatHeight=0.35 SeatLength=0.5 Width=0.5
  custom script SeatGroup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

Custom "XL_Seat_UP_Forward", child of "Cabin_Seats_Economy_Upward"
  location (X Y Z) 9.33043 -4.45652 2.5, rotation 0 0 0
  symmetric about XZ
  bounding box size 1.97685 9.41304 1.30447
  Layout: AisleWidth=1 NumLeft=0 NumMiddle=0 NumRight=2 NumRow=2 SeatGap=0.2 SeatPitch=1
  Design: BackAngle=25 BackHeight=1 BackThick=0.1 SeatHeight=0.35 SeatLength=0.5 Width=0.5
  custom script SeatGroup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

Custom "XL_SEAT_UP BACKWARD", child of "XL_Seat_UP_Forward"
  location (X Y Z) 12.0652 -4.8913 2.5, rotation 0 0 0
  symmetric about XZ
  bounding box size 1.97685 10.2826 1.30447
  Layout: AisleWidth=1 NumLeft=0 NumMiddle=0 NumRight=2 NumRow=2 SeatGap=0.2 SeatPitch=1
  Design: BackAngle=25 BackHeight=1 BackThick=0.1 SeatHeight=0.35 SeatLength=0.5 Width=0.5
  custom script SeatGroup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

Custom "Front_row_up_first", child of "Cabin_Seats_Economy_Upward"
  location (X Y Z) -6.04348 -0.652174 2.609, rotation 0 0 0
  bounding box size 2.59685 2.138 1.30447
  Layout: AisleWidth=0.41 NumLeft=0 NumMiddle=4 NumRight=0 NumRow=3 SeatGap=0.046 SeatPitch=0.81
  Design: BackAngle=25 BackHeight=1 BackThick=0.1 SeatHeight=0.35 SeatLength=0.5 Width=0.5
  custom script SeatGroup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

Custom "Business_Class_aft", child of "Aether_wing"
  location (X Y Z) 1.19565 2.6087 1.19565, rotation 0 0 -72.3913
  symmetric about XZ
  bounding box size 8.2792 9.83034 1.3132
  Layout: AisleWidth=0.450959 NumLeft=2 NumMiddle=3 NumRight=2 NumRow=1 SeatGap=0.692301 SeatPitch=0.0016875
  Design: BackAngle=25 BackHeight=0.85 BackThick=0.1 SeatHeight=0.4 SeatLength=0.45 Width=0.48
  custom script SeatGroup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

Custom "Business_Class_fore", child of "Business_Class_aft"
  location (X Y Z) -4.34783 1.41304 1.19565, rotation 0 0 -80.7609
  symmetric about XZ
  bounding box size 4.95625 3.97147 1.3132
  Layout: AisleWidth=0.450959 NumLeft=2 NumMiddle=3 NumRight=0 NumRow=1 SeatGap=0.507954 SeatPitch=0.0016875
  Design: BackAngle=25 BackHeight=0.85 BackThick=0.1 SeatHeight=0.4 SeatLength=0.45 Width=0.48
  custom script SeatGroup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

Custom "Cabin_Seats_Economy_Down", child of "Aether_wing"
  location (X Y Z) 1.52174 -2.71739 -0.652174, rotation 0 -0.978261 0
  bounding box size 11.5274 5.852 1.50074
  Layout: AisleWidth=0.201 NumLeft=3 NumMiddle=4 NumRight=3 NumRow=14 SeatGap=0.05 SeatPitch=0.81
  Design: BackAngle=25 BackHeight=1 BackThick=0.1 SeatHeight=0.35 SeatLength=0.5 Width=0.5
  custom script SeatGroup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

Custom "Front_row_down", child of "Cabin_Seats_Economy_Down"
  location (X Y Z) 0.217391 -2.3913 -0.652435, rotation 0 0 0
  bounding box size 0.976849 5.142 1.30447
  Layout: AisleWidth=0.41 NumLeft=2 NumMiddle=4 NumRight=2 NumRow=1 SeatGap=0.046 SeatPitch=0.81
  Design: BackAngle=25 BackHeight=1 BackThick=0.1 SeatHeight=0.35 SeatLength=0.5 Width=0.5
  custom script SeatGroup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

Custom "XL_SEAT_DOWN_BACKWARD", child of "Cabin_Seats_Economy_Down"
  location (X Y Z) 10.9783 -4.13013 -0.435043, rotation 0 0 0
  symmetric about XZ
  bounding box size 1.97685 8.76026 1.30447
  Layout: AisleWidth=1 NumLeft=0 NumMiddle=0 NumRight=1 NumRow=2 SeatGap=0.2 SeatPitch=1
  Design: BackAngle=25 BackHeight=1 BackThick=0.1 SeatHeight=0.35 SeatLength=0.5 Width=0.5
  custom script SeatGroup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

Custom "XL_SEAT_DOWN_FORWARD", child of "XL_SEAT_DOWN_BACKWARD"
  location (X Y Z) 7.28261 -4.56491 -0.435043, rotation 0 0 0
  symmetric about XZ
  bounding box size 1.97685 9.62983 1.30447
  Layout: AisleWidth=1 NumLeft=0 NumMiddle=0 NumRight=2 NumRow=2 SeatGap=0.2 SeatPitch=1
  Design: BackAngle=25 BackHeight=1 BackThick=0.1 SeatHeight=0.35 SeatLength=0.5 Width=0.5
  custom script SeatGroup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

Custom "Front_row_down_first", child of "Cabin_Seats_Economy_Down"
  location (X Y Z) -5.32609 -0.869565 -0.652435, rotation 0 0 0
  bounding box size 5.02685 2.138 1.30447
  Layout: AisleWidth=0.41 NumLeft=0 NumMiddle=4 NumRight=0 NumRow=6 SeatGap=0.046 SeatPitch=0.81
  Design: BackAngle=25 BackHeight=1 BackThick=0.1 SeatHeight=0.35 SeatLength=0.5 Width=0.5
  custom script SeatGroup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

Custom "Seat", child of "Cabin_Seats_Economy_Down"
  location (X Y Z) -6.73913 0 -1.522, rotation 0.543478 -90 0; relative location -6.73913 0 -1.522, rotation 0.869565 -90 0.326087
  bounding box size 0.55 0.823243 1.40762
  Design: BackAngle=0 BackHeight=1 BackThick=0.1 SeatHeight=0.35 SeatLength=0.5 Width=0.81
  custom script Seat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

Custom "SeatGroup", child of "Cabin_Seats_Economy_Down"
  location (X Y Z) 13.913 -0.76087 0.10887, rotation 0 0 0
  bounding box size 5.83685 1.9 1.30447
  Layout: AisleWidth=1 NumLeft=0 NumMiddle=3 NumRight=0 NumRow=7 SeatGap=0.2 SeatPitch=0.81
  Design: BackAngle=25 BackHeight=1 BackThick=0.1 SeatHeight=0.35 SeatLength=0.5 Width=0.5
  custom script SeatGroup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

Pod "Tank_Aux_Transition", child of "Aether_wing"
  location (X Y Z) 15.287 2.7 -0.0173913, rotation 0 0 0
  symmetric about XZ
  bounding box size 12.1764 8.10588 2.70588
  Design: FineRatio=9 Length=12.1764

Pod "Tank_Aux_Transition", child of "Tank_Aux_Transition"
  location (X Y Z) 19.1609 13.9 0.0173913, rotation 0 0 0
  symmetric about XZ
  bounding box size 6.95455 29.3455 1.54545
  Design: FineRatio=9 Length=6.95455

Pod "Tank_Aux_Transition", child of "Tank_Aux_Transition"
  location (X Y Z) 21.3739 0 0.382609, rotation 0 0 0
  bounding box size 8.78554 1.95234 1.95234
  Design: FineRatio=9 Length=8.78554

Pod "Tank_Main_Outboard", child of "Aether_wing"
  location (X Y Z) 16.5 11.32 0.15, rotation 0 0 0
  symmetric about XZ
  bounding box size 10 25.6385 2.9985
  Design: FineRatio=6.67 Length=10

Fuselage "Cargo_bay_middle", child of "Aether_wing"
  location (X Y Z) -3 -0.57377 -1.88525, rotation 0 0 0
  bounding box size 22.9478 5.996 3.52123
  Design: Length=22.6323
  cross sections:
    n  XLocPercent  YLocPercent  YRotate  ZLocPercent  ZRotate  shape
    0  0            0            0        0            0        point
    1  0            0            0        0            0        point
    2  0.004        0.0245902    1.28571  0            0        rounded rectangle RoundRectXSec_Radius=0.2 RoundedRect_Height=1.75 RoundedRect_Width=1.65889
    3  0.0484239    0.0245902    1.28571  -0.0285877   0        rounded rectangle RoundRectXSec_Radius=0.2 RoundedRect_Height=2.19105 RoundedRect_Width=3.89818
    4  0.184363     0.0245902    1.28571  -0.034535    0        rounded rectangle RoundRectXSec_Radius=0.2 RoundedRect_Height=2.54432 RoundedRect_Width=3.52363
    5  0.456242     0.0245902    1.28571  -0.0103293   0        rounded rectangle RoundRectXSec_Radius=0.2 RoundedRect_Height=2.58891 RoundedRect_Width=5.01236
    6  0.728121     0.020391     1.28571  3.44192e-05  0        rounded rectangle RoundRectXSec_Radius=0.2 RoundedRect_Height=2.63776 RoundedRect_Width=5.996
    7  0.796091     0.020391     1.28571  6.71862e-05  0        rounded rectangle RoundRectXSec_Radius=0.2 RoundedRect_Height=2.78163 RoundedRect_Width=5.996
    8  0.864061     0.0245902    1.28571  0.0244558    0        rounded rectangle RoundRectXSec_Radius=0.2 RoundedRect_Height=1.75 RoundedRect_Width=3.06288
    9  1            0.020391     1.28571  0.032451     1.92857  rounded rectangle RoundRectXSec_Radius=0.2 RoundedRect_Height=1.2098 RoundedRect_Width=1.72307

Fuselage "Nose_fairing", child of "Aether_wing"
  location (X Y Z) -15.5 0 0.82, rotation 0 0 0
  bounding box size 9.5 7.00002 8.40008
  Design: Length=9.5
  cross sections:
    n  XLocPercent  YLocPercent  ZLocPercent  shape
    0  0            0            -0.139       point
    1  0.105        0            -0.023       ellipse Ellipse_Height=3.2 Ellipse_Width=3.4
    2  0.316        0            0.014        ellipse Ellipse_Height=5.8 Ellipse_Width=5.6
    3  0.579        0            0.012        super ellipse Super_Height=7 Super_M=2.5 Super_MaxWidthLoc=0 Super_N=2.5 Super_Width=6.4
    4  1            0            0            super ellipse Super_Height=8.4 Super_M=2.5 Super_MaxWidthLoc=0 Super_N=2.5 Super_Width=7

Fuselage "NLG_strut_up"
  location (X Y Z) -7 0 -3.1, rotation 0 0 0
  bounding box size 3.02724 0.32 0.32
  Design: Length=3.02724
  cross sections:
    n  XLocPercent  YLocPercent  ZLocPercent  shape
    0  0            0            0            circle Circle_Diameter=0.32
    1  0.25         0            0            as above
    2  0.5          0            0            as above
    3  0.75         0            0            as above
    4  1            0            0            as above

Fuselage "NLG_axle_up"
  location (X Y Z) -3.97276 -0.633 -3.1, rotation 0 0 90
  bounding box size 0.18 1.266 0.18
  Design: Length=1.266
  cross sections:
    n  XLocPercent  YLocPercent  ZLocPercent  shape
    0  0            0            0            circle Circle_Diameter=0.18
    1  0.25         0            0            as above
    2  0.5          0            0            as above
    3  0.75         0            0            as above
    4  1            0            0            as above

Fuselage "NLG_tire_L_up"
  location (X Y Z) -3.97276 -0.633 -3.1, rotation 0 0 90
  bounding box size 1.27 0.508 1.27
  Design: Length=0.508
  cross sections:
    n  XLocPercent  YLocPercent  ZLocPercent  shape
    0  0            0            0            circle Circle_Diameter=0.955675
    1  0.2          0            0            circle Circle_Diameter=1.2319
    2  0.5          0            0            circle Circle_Diameter=1.27
    3  0.8          0            0            circle Circle_Diameter=1.2319
    4  1            0            0            circle Circle_Diameter=0.955675

Fuselage "NLG_tire_R_up"
  location (X Y Z) -3.97276 0.125 -3.1, rotation 0 0 90
  bounding box size 1.27 0.508 1.27
  Design: Length=0.508
  cross sections:
    n  XLocPercent  YLocPercent  ZLocPercent  shape
    0  0            0            0            circle Circle_Diameter=0.955675
    1  0.2          0            0            circle Circle_Diameter=1.2319
    2  0.5          0            0            circle Circle_Diameter=1.27
    3  0.8          0            0            circle Circle_Diameter=1.2319
    4  1            0            0            circle Circle_Diameter=0.955675

Fuselage "MLG_strut_up"
  location (X Y Z) 19.3 4.8 -2.9, rotation -180 0 -180
  symmetric about XZ
  bounding box size 3.22724 10.17 0.57
  Design: Length=3.22724
  cross sections:
    n  XLocPercent  YLocPercent  ZLocPercent  shape
    0  0            0            0            circle Circle_Diameter=0.57
    1  0.25         0            0            as above
    2  0.5          0            0            as above
    3  0.75         0            0            as above
    4  1            0            0            as above

Fuselage "MLG_bogie_up"
  location (X Y Z) 14.3228 4.8 -2.9, rotation 0 0 0
  symmetric about XZ
  bounding box size 3.5 9.9 0.3
  Design: Length=3.5
  cross sections:
    n  XLocPercent  YLocPercent  ZLocPercent  shape
    0  0            0            0            circle Circle_Diameter=0.3
    1  0.25         0            0            as above
    2  0.5          0            0            as above
    3  0.75         0            0            as above
    4  1            0            0            as above

Fuselage "MLG_axle_1_up"
  location (X Y Z) 14.6228 4.142 -2.9, rotation 0 0 90
  symmetric about XZ
  bounding box size 0.18 10.916 0.18
  Design: Length=1.316
  cross sections:
    n  XLocPercent  YLocPercent  ZLocPercent  shape
    0  0            0            0            circle Circle_Diameter=0.18
    1  0.25         0            0            as above
    2  0.5          0            0            as above
    3  0.75         0            0            as above
    4  1            0            0            as above

Fuselage "MLG_tire_1_up"
  location (X Y Z) 14.6228 4.142 -2.9, rotation 0 0 90
  symmetric about XZ
  bounding box size 1.27 9.3 1.27
  Design: Length=0.508
  cross sections:
    n  XLocPercent  YLocPercent  ZLocPercent  shape
    0  0            0            0            circle Circle_Diameter=0.955675
    1  0.2          0            0            circle Circle_Diameter=1.2319
    2  0.5          0            0            circle Circle_Diameter=1.27
    3  0.8          0            0            circle Circle_Diameter=1.2319
    4  1            0            0            circle Circle_Diameter=0.955675

Fuselage "MLG_tire_2_up"
  location (X Y Z) 14.6228 4.95 -2.9, rotation 0 0 90
  symmetric about XZ
  bounding box size 1.27 10.916 1.27
  Design: Length=0.508
  cross sections:
    n  XLocPercent  YLocPercent  ZLocPercent  shape
    0  0            0            0            circle Circle_Diameter=0.955675
    1  0.2          0            0            circle Circle_Diameter=1.2319
    2  0.5          0            0            circle Circle_Diameter=1.27
    3  0.8          0            0            circle Circle_Diameter=1.2319
    4  1            0            0            circle Circle_Diameter=0.955675

Fuselage "MLG_axle_2_up"
  location (X Y Z) 16.0728 4.142 -2.9, rotation 0 0 90
  symmetric about XZ
  bounding box size 0.18 10.916 0.18
  Design: Length=1.316
  cross sections:
    n  XLocPercent  YLocPercent  ZLocPercent  shape
    0  0            0            0            circle Circle_Diameter=0.18
    1  0.25         0            0            as above
    2  0.5          0            0            as above
    3  0.75         0            0            as above
    4  1            0            0            as above

Fuselage "MLG_tire_3_up"
  location (X Y Z) 16.0728 4.142 -2.9, rotation 0 0 90
  symmetric about XZ
  bounding box size 1.27 9.3 1.27
  Design: Length=0.508
  cross sections:
    n  XLocPercent  YLocPercent  ZLocPercent  shape
    0  0            0            0            circle Circle_Diameter=0.955675
    1  0.2          0            0            circle Circle_Diameter=1.2319
    2  0.5          0            0            circle Circle_Diameter=1.27
    3  0.8          0            0            circle Circle_Diameter=1.2319
    4  1            0            0            circle Circle_Diameter=0.955675

Fuselage "MLG_tire_4_up"
  location (X Y Z) 16.0728 4.95 -2.9, rotation 0 0 90
  symmetric about XZ
  bounding box size 1.27 10.916 1.27
  Design: Length=0.508
  cross sections:
    n  XLocPercent  YLocPercent  ZLocPercent  shape
    0  0            0            0            circle Circle_Diameter=0.955675
    1  0.2          0            0            circle Circle_Diameter=1.2319
    2  0.5          0            0            circle Circle_Diameter=1.27
    3  0.8          0            0            circle Circle_Diameter=1.2319
    4  1            0            0            circle Circle_Diameter=0.955675

Fuselage "MLG_axle_3_up"
  location (X Y Z) 17.5228 4.142 -2.9, rotation 0 0 90
  symmetric about XZ
  bounding box size 0.18 10.916 0.18
  Design: Length=1.316
  cross sections:
    n  XLocPercent  YLocPercent  ZLocPercent  shape
    0  0            0            0            circle Circle_Diameter=0.18
    1  0.25         0            0            as above
    2  0.5          0            0            as above
    3  0.75         0            0            as above
    4  1            0            0            as above

Fuselage "MLG_tire_5_up"
  location (X Y Z) 17.5228 4.142 -2.9, rotation 0 0 90
  symmetric about XZ
  bounding box size 1.27 9.3 1.27
  Design: Length=0.508
  cross sections:
    n  XLocPercent  YLocPercent  ZLocPercent  shape
    0  0            0            0            circle Circle_Diameter=0.955675
    1  0.2          0            0            circle Circle_Diameter=1.2319
    2  0.5          0            0            circle Circle_Diameter=1.27
    3  0.8          0            0            circle Circle_Diameter=1.2319
    4  1            0            0            circle Circle_Diameter=0.955675

Fuselage "MLG_tire_6_up"
  location (X Y Z) 17.5228 4.95 -2.9, rotation 0 0 90
  symmetric about XZ
  bounding box size 1.27 10.916 1.27
  Design: Length=0.508
  cross sections:
    n  XLocPercent  YLocPercent  ZLocPercent  shape
    0  0            0            0            circle Circle_Diameter=0.955675
    1  0.2          0            0            circle Circle_Diameter=1.2319
    2  0.5          0            0            circle Circle_Diameter=1.27
    3  0.8          0            0            circle Circle_Diameter=1.2319
    4  1            0            0            circle Circle_Diameter=0.955675

VSPAERO settings (reference component "Aether_wing"): Sref=1057.58 bref=83.7864 cref=16.8501 Xcg=0 Ycg=0 Zcg=0 AlphaStart=-2 AlphaEnd=6 AlphaNpts=5 BetaStart=0 BetaEnd=0 BetaNpts=1 MachStart=0.85 MachEnd=0 MachNpts=1 ReCref=1e+07 Vinf=100 Rho=0.002377
